// SBML level 2 version 2

model Singh2006_TCA_Ecoli_glucose()
  // This model is automatically converted from the Model BIOMD0000000222 by using libsbml. According to the terms of use, this generated model is not related with Model BIOMD0000000222 any more.
  // biomodels.db:BIOMD0000000222
  // biomodels.db:MODEL8583955822
  // isDescribedBy pubmed:16887020
  // occursIn taxonomy:562
  // hasVersion GO:0006099 GO:0006097
  // isHomologTo reactome:REACT_1785

  // Compartments:
  compartment cell = 1;

  // Species:
  species $aca in cell = 0.5;  // isVersionOf CHEBI:15351 kegg.compound:C00024
  species $oaa in cell = 0.004;  // isVersionOf CHEBI:30744 kegg.compound:C00036
  species $coa in cell = 0.0001;  // isVersionOf CHEBI:15346 kegg.compound:C000010
  species cit in cell = 3;  // isVersionOf CHEBI:30769 kegg.compound:C00158
  species icit in cell = 0.018;  // isVersionOf CHEBI:30887 kegg.compound:C00311
  species akg in cell = 0.2;  // isVersionOf CHEBI:30915 kegg.compound:C00026
  species sca in cell = 0.04;  // isVersionOf CHEBI:15380 kegg.compound:C00091
  species suc in cell = 0.6;  // isVersionOf CHEBI:15741 kegg.compound:C00042
  species fa in cell = 0.3;  // isVersionOf CHEBI:18012 kegg.compound:C00122
  species mal in cell = 1.8;  // isVersionOf CHEBI:6650 kegg.compound:C00711
  species gly in cell = 4;  // isVersionOf CHEBI:16891 kegg.compound:C00048
  species $biosyn in cell = 0.1;

  // Reactions:
  CS: $aca + $oaa -> $coa + cit; cell 
              
                
                
                  
                  
                    
                     Vf_cs 
                    
                      
                       aca 
                       Kaca_cs 
                    
                    
                      
                       oaa 
                       Koaa_cs 
                    
                  
                  
                    
                     Vr_cs 
                    
                      
                       coa 
                       Kcoa_cs 
                    
                    
                      
                       cit 
                       Kcit_cs 
                    
                  
                
                
                  
                  
                    
                     1 
                    
                      
                       aca 
                       Kaca_cs 
                    
                    
                      
                       coa 
                       Kcoa_cs 
                    
                  
                  
                    
                     1 
                    
                      
                       oaa 
                       Koaa_cs 
                    
                    
                      
                       cit 
                       Kcit_cs;  // isVersionOf kegg.reaction:R00351
    Vf_cs = 91.2 mmlmin; Kaca_cs = 0.03 mml; Koaa_cs = 0.07 mml; Vr_cs = 0.912 mmlmin; Kcoa_cs = 0.3 mml;
  ACN: cit -> icit; cell*((Vf_acn*(cit/Kcit_acn) - Vr_acn*(icit/Kicit_acn))/(1 + cit/Kcit_acn + icit/Kicit_acn));  // isVersionOf kegg.reaction:R01324
    Vf_acn = 91.2 mmlmin; Kcit_acn = 1.7 mml; Vr_acn = 0.912 mmlmin; Kicit_acn = 3.33 mml;
  ICD: icit -> akg; cell*((ICD_Vf_icd*(icit/ICD_Kicit_icd) - ICD_Vr_icd*(akg/ICD_Kakg_icd))/(1 + icit/ICD_Kicit_icd + akg/ICD_Kakg_icd));  // isVersionOf kegg.reaction:R00709
    ICD_Vf_icd = 14.72 mmlmin; ICD_Kicit_icd = 0.008 mml; ICD_Vr_icd = 0.1472 mmlmin; ICD_Kakg_icd = 0.13 mml;
  KDH: akg -> sca; cell*((Vf_kdh*(akg/Kakg_kdh) - Vr_kdh*(sca/Ksca_kdh))/(1 + akg/Kakg_kdh + sca/Ksca_kdh));  // isVersionOf kegg.reaction:R08549
    Vf_kdh = 35.84 mmlmin; Kakg_kdh = 0.1 mml; Vr_kdh = 0.3584 mmlmin; Ksca_kdh = 1 mml;
  ScAS: sca -> suc; cell*((Vf_scas*(sca/Ksca_scas) - Vr_scas*(suc/Ksuc_scas))/(1 + sca/Ksca_scas + suc/Ksuc_scas));  // isVersionOf kegg.reaction:R00407
    Vf_scas = 3.5 mmlmin; Ksca_scas = 0.02 mml; Vr_scas = 0.035 mmlmin; Ksuc_scas = 5 mml;
  SDH: suc -> fa; cell*((Vf_sdh*(suc/Ksuc_sdh) - Vr_sdh*(fa/Kfa_sdh))/(1 + suc/Ksuc_sdh + fa/Kfa_sdh));  // isVersionOf kegg.reaction:R00402
    Vf_sdh = 7.38 mmlmin; Ksuc_sdh = 0.02 mml; Vr_sdh = 7.31 mmlmin; Kfa_sdh = 0.4 mml;
  FUM: fa -> mal; cell*((Vf_fum*(fa/Kfa_fum) - Vr_fum*(mal/Kmal_fum))/(1 + fa/Kfa_fum + mal/Kmal_fum));  // isVersionOf kegg.reaction:R01082
    Vf_fum = 44.64 mmlmin; Kfa_fum = 0.15 mml; Vr_fum = 37.2 mmlmin; Kmal_fum = 0.04 mml;
  MDH: mal -> $oaa; cell*((Vf_mdh*(mal/Kmal_mdh) - Vr_mdh*(oaa/Koaa_mdh))/(1 + mal/Kmal_mdh + oaa/Koaa_mdh));  // isVersionOf kegg.reaction:R00342
    Vf_mdh = 356.64 mmlmin; Kmal_mdh = 2.6 mml; Vr_mdh = 353.11 mmlmin; Koaa_mdh = 0.04 mml;
  ICL: icit -> suc + gly; cell*((Vf_icl*(icit/Kicit_icl) - Vr_icl*(suc/Ksuc_icl)*(gly/Kgly_icl))/(1 + icit/Kicit_icl + suc/Ksuc_icl + gly/Kgly_icl + icit/Kicit_icl*(suc/Ksuc_icl) + suc/Ksuc_icl*(gly/Kgly_icl)));  // isVersionOf kegg.reaction:R00479
    Vf_icl = 1.9 mmlmin; Kicit_icl = 0.604 mml; Vr_icl = 0.019 mmlmin; Ksuc_icl = 0.59 mml; Kgly_icl = 0.13 mml;
  MS: gly + $aca -> mal + $coa; cell*((Vf_ms*(gly/Kgly_ms)*(aca/Kaca_ms) - Vr_ms*(mal/Kmal_ms)*(coa/Kcoa_ms))/((1 + gly/Kgly_ms + mal/Kmal_ms)*(1 + aca/Kaca_ms + coa/Kcoa_ms)));  // isVersionOf kegg.reaction:R00472
    Vf_ms = 1.9 mmlmin; Kgly_ms = 2 mml; Kaca_ms = 0.01 mml; Vr_ms = 0.019 mmlmin; Kmal_ms = 1 mml; Kcoa_ms = 0.1 mml;
  SYN: akg -> $biosyn; cell*0.188*((SYN_Vf_icd*(icit/SYN_Kicit_icd) - SYN_Vr_icd*(akg/SYN_Kakg_icd))/(1 + icit/SYN_Kicit_icd + akg/SYN_Kakg_icd));  // modifiers: icit; isVersionOf GO:0006103
    SYN_Vf_icd = 14.72 mmlmin; SYN_Kicit_icd = 0.008 mml; SYN_Vr_icd = 0.1472 mmlmin; SYN_Kakg_icd = 0.13 mml;

  // Unit definitions:
  unit substance = 1e-3 mole;
  unit mmlmin = 1e-3 mole / (litre * 60 second);
  unit mml = 1e-3 mole / litre;
end
