// SBML level 2 version 3
// dcterms:bibliographicCitation: urn:miriam:pubmed:15383589
// dcterms:bibliographicCitation: urn:miriam:pubmed:18370401
// dcterms:bibliographicCitation: Km value urn:miriam:pubmed:17300176 Turnover ratio to KYNU_3 said to be 10 urn:miriam:pubmed:457635
// dcterms:bibliographicCitation: Rabbit urn:miriam:pubmed:10587452
// dcterms:bibliographicCitation: km_for_Oxaloacetate instead of Oxoglutarate urn:miriam:pubmed:15606768
// dcterms:bibliographicCitation: Rat urn:miriam:pubmed:4190298
// dcterms:bibliographicCitation: Recombinant K3H urn:miriam:pubmed:10672018
// dcterms:bibliographicCitation: Rabbit urn:miriam:pubmed:3949799
// dcterms:bibliographicCitation: Km = 0.003 and turnover =4 :Rat liver urn:miriam:pubmed:3112306 Beef; using all values from here urn:miriam:pubmed:12672479
// dcterms:bibliographicCitation: 3-Hydroxy-DL-kynurenine urn:miriam:pubmed:17300176
// dcterms:bibliographicCitation: urn:miriam:pubmed:8605195
// dcterms:bibliographicCitation: Sus scrofa (pig): km and turnover urn:miriam:pubmed:18547057
// dcterms:bibliographicCitation: Human urn:miriam:pubmed:18370401
// dcterms:bibliographicCitation: Not very well described what kinetics they used and mechanism assumed urn:miriam:pubmed:11676605
// dcterms:bibliographicCitation: Rat urn:miriam:pubmed:4135014
// dcterms:bibliographicCitation: Pseudomonas Fluoresence urn:miriam:pubmed:15656614
// dcterms:bibliographicCitation: Rat km and turover. got numbers from brenda. Check if turnover has been calculated by Brenda people as I cannot find turnover within the article urn:miriam:pubmed:11754741
// dcterms:bibliographicCitation: Salter et al 1986
// dcterms:bibliographicCitation: Also contains km for PRPP urn:miriam:pubmed:17868694
// dcterms:bibliographicCitation: Turnover said to be 5.6% of L-kynurenine urn:miriam:pubmed:457635 Km for Pseudomonas fluorescens urn:miriam:pubmed:118164
// dcterms:bibliographicCitation: Shinohara: activity 13.5 of lfmkynr urn:miriam:pubmed:4190298
// dcterms:bibliographicCitation: This reference also contains info in inhibition urn:miriam:pubmed:17402747
// dcterms:bibliographicCitation: Ki=1 for QA and KA reduces enzyme activity of 61 and 59% respectively urn:miriam:pubmed:17288562

function function_4(E_T, turnover_A, scaling, A, Km_b, Km_c, Km_a, B, C)
  E_T*turnover_A*scaling*A*Km_b*Km_c/(Km_a*Km_b*Km_c + Km_b*Km_c*A + Km_a*Km_c*B + Km_a*Km_b*C);
end
function_4 is "Enzyme competition for 3 reactions";

function function_5(Kcat, E_T, A, B, Ka, Kb, s3, s4, scaling)
  Kcat*E_T*A*B*s3*s4*scaling/(Ka*Kb + Kb*A + Ka*B + A*B);
end
function_5 is "Four substrate Michaelis-Menten (irreversible), s3 and s4 constant";

function function_2(E_T, turnover, s1, s2, Km, scaling)
  E_T*turnover*s1*s2*scaling/(Km + s1);
end
function_2 is "Two substrates, s2 constant, turnover";

function Mass_action_two_substrate(s1, e1, s2, e2, k1)
  k1*s1^e1*s2^e2;
end
Mass_action_two_substrate is "Mass action (two substrate)";

function function_77(Kcat, E_T, A, B, s3, Ka, Kb, scaling)
  Kcat*E_T*A*B*s3*scaling/(Ka*Kb + Kb*A + Ka*B + A*B);
end
function_77 is "Three substrate Michaelis-Menten (irreversible), s3 contant";

function function_1(E_T, turnover, s1, s2, s3, Km, scaling)
  E_T*turnover*s1*s2*s3*scaling/(Km + s1);
end
function_1 is "Three substrates, s2 and s3 constant, turnover";

function function_8(E_T, turnover, A, P, scaling, Km)
  E_T*turnover*(A - P)*scaling/(Km + A + P);
end
function_8 is "Reversible Transport reaction (turnover)";

function function_3(E_T, turnover_B, scaling, B, Km_a, Km_b, A)
  E_T*turnover_B*scaling*B*Km_a/(Km_b*Km_a + Km_b*A + Km_a*B);
end
function_3 is "Enzyme Competition for 2 reactions";

function Two_substrate_michaelis_menten(Kcat, E_T, A, B, Ka, Kb, scaling)
  Kcat*E_T*A*B*scaling/(Ka*Kb + Kb*A + Ka*B + A*B);
end
Two_substrate_michaelis_menten is "Two substrate michaelis-menten";

function function_6(E_T, turnover, s1, Ki1, Ki2, s2, scaling, Km, I1, I2)
  E_T*turnover*s1*Ki1*Ki2*s2*scaling/(Km*Ki1*Ki2 + s1*Ki1*Ki2 + I1*Km*Ki2 + I2*Km*Ki1);
end
function_6 is "Competitive inhibition, two inhibitors, two substrates, s2 constant, turnover";

function function_9(E_T, turnover, s1, Ki1, Ki2, scaling, Km, I1, I2)
  E_T*turnover*s1*Ki1*Ki2*scaling/(Km*Ki1*Ki2 + s1*Ki1*Ki2 + I1*Km*Ki2 + I2*Km*Ki1);
end
function_9 is "Competitive inhibition, two inhibitors, turnover";

model Model_1()
  // TRP_met_27_1_2010_17h29

  // Compartments:
  compartment Cytosol = 1;

  // Species:
  species M_3hanthrn_c in Cytosol = 0;
  species M_4aphdob_c in Cytosol = 0;
  species M_5hoxnfkyn_c in Cytosol = 0;
  species M_5htrp_c in Cytosol = 0;
  species $M_5hxkyn_c in Cytosol = 0;
  species M_Lfmkynr_c in Cytosol = 0;
  species M_Lkynr_c in Cytosol = 0;
  species $M_ahcys_c in Cytosol = 0;
  species $M_akg_c in Cytosol = 1;
  species $M_ala_DASH_L_c in Cytosol = 0;
  species $M_amet_c in Cytosol = 1;
  species $M_anth_c in Cytosol = 0;
  species M_cmusa_c in Cytosol = 0;
  species $M_dhbpt_c in Cytosol = 0;
  species $M_for_c in Cytosol = 0;
  species $M_glu_DASH_L_c in Cytosol = 0;
  species M_hLkynr_c in Cytosol = 0;
  species M_id3acald_c in Cytosol = 0;
  species $M_ind3ac_c in Cytosol = 0;
  species $M_indpyr_c in Cytosol = 0;
  species $M_nmtrpta_c in Cytosol = 0;
  species M_quln_c in Cytosol = 0;
  species M_srtn_c in Cytosol = 0;
  species $M_thbpt in Cytosol = 1;
  species $M_trna_trp_c in Cytosol = 1;
  species M_trp_DASH_L_c in Cytosol = 0;
  species $M_trp_L_trna_c in Cytosol = 0;
  species M_trypta_c in Cytosol = 0;
  species $M_amp_c in Cytosol = 1;
  species $M_atp_c in Cytosol = 1;
  species $M_co2_c in Cytosol = 1;
  species $M_h2o2_c in Cytosol = 1;
  species $M_h2o_c in Cytosol = 1;
  species $M_h_c in Cytosol = 1;
  species $M_nad_c in Cytosol = 1;
  species $M_nadh_c in Cytosol = 1;
  species $M_nadp_c in Cytosol = 1;
  species $M_nadph_c in Cytosol = 1;
  species $M_nh4_c in Cytosol = 1;
  species $M_o2_c in Cytosol = 1;
  species $M_o2s_c in Cytosol = 1;
  species $M_ppi_c in Cytosol = 0;
  species M_Cinnavalininate_c in Cytosol = 0;
  species M_kynate_c in Cytosol = 0;
  species $TRP_ex in Cytosol = 0.05;
  species M_nicrnt_c in Cytosol = 0;
  species $M_prpp_c in Cytosol = 1;
  species M_nformanth_c in Cytosol = 0;
  species $M_dnad_c in Cytosol = 0;
  species $Cinn_ex in Cytosol = 0;
  species $kynurenate_ex in Cytosol = 0;
  species $M_am6sa_c in Cytosol = 0;
  species $M_5hoxindact_c in Cytosol = 0;
  species $M_Nacsertn_c in Cytosol = 0;
  species $M_accoa_c in Cytosol = 1;
  species $M_coa_c in Cytosol = 0;

  // Parameters:
  scaling = 1;

  // Reactions:
  IL4I1_turnover_set_to_1: M_trp_DASH_L_c + $M_h2o_c + $M_o2_c => $M_indpyr_c + $M_nh4_c + $M_h2o2_c; Cytosol*function_1(IL4I1_turnover_set_to_1_E_T, IL4I1_turnover_set_to_1_turnover, M_trp_DASH_L_c, M_h2o_c, M_o2_c, IL4I1_turnover_set_to_1_Km, scaling);  // kegg.reaction:R00677 ec-code:1.4.3.2; isDescribedBy pubmed:15383589
    IL4I1_turnover_set_to_1_E_T = 110.9; IL4I1_turnover_set_to_1_turnover = 1; IL4I1_turnover_set_to_1_Km = 6.5;
  R00678_TDO: M_trp_DASH_L_c + $M_o2_c => M_Lfmkynr_c; Cytosol*function_2(R00678_TDO_E_T, R00678_TDO_turnover, M_trp_DASH_L_c, M_o2_c, R00678_TDO_Km, scaling);  // kegg.reaction:R00678 ec-code:1.13.11.11; isDescribedBy pubmed:18370401
    R00678_TDO_E_T = 98.81; R00678_TDO_turnover = 2.1; R00678_TDO_Km = 0.19;
  DDC_used_numbers_from_5HT: M_trp_DASH_L_c => M_trypta_c + $M_co2_c; Cytosol*function_3(DDC_used_numbers_from_5HT_E_T, DDC_used_numbers_from_5HT_turnover_B, scaling, M_trp_DASH_L_c, DDC_used_numbers_from_5HT_Km_a, DDC_used_numbers_from_5HT_Km_b, M_trp_DASH_L_c);  // ec-code:4.1.1.28 kegg.reaction:R00685
    DDC_used_numbers_from_5HT_E_T = 127.55; DDC_used_numbers_from_5HT_turnover_B = 0.67; DDC_used_numbers_from_5HT_Km_a = 0.049; DDC_used_numbers_from_5HT_Km_b = 0.049;
  KYNU_2: M_Lkynr_c + $M_h2o_c => $M_anth_c + $M_ala_DASH_L_c; Cytosol*function_4(KYNU_2_E_T, KYNU_2_turnover_A, scaling, M_Lkynr_c, KYNU_2_Km_b, KYNU_2_Km_c, KYNU_2_Km_a, M_hLkynr_c, M_Lfmkynr_c);  // modifiers: M_hLkynr_c, M_Lfmkynr_c; ec-code:3.7.1.3 kegg.reaction:R00987; isDescribedBy pubmed:17300176 pubmed:457635
    KYNU_2_E_T = 123.99; KYNU_2_turnover_A = 0.35; KYNU_2_Km_b = 0.03; KYNU_2_Km_c = 2.2; KYNU_2_Km_a = 0.438;
  TPH1: $M_thbpt + M_trp_DASH_L_c + $M_o2_c => M_5htrp_c + $M_dhbpt_c + $M_h2o_c; Cytosol*function_1(TPH1_E_T, TPH1_turnover, M_trp_DASH_L_c, M_thbpt, M_o2_c, TPH1_Km, scaling);  // kegg.reaction:R01814 ec-code:1.14.16.4; isDescribedBy pubmed:10587452
    TPH1_E_T = 118.47; TPH1_turnover = 0.207; TPH1_Km = 0.0021;
  R01956: M_Lkynr_c + $M_akg_c => M_4aphdob_c + $M_glu_DASH_L_c; Cytosol*Two_substrate_michaelis_menten(R01956_Kcat, R01956_E_T, M_Lkynr_c, M_akg_c, R01956_Ka, R01956_Kb, scaling); R01956 is "AADAT_lk_use_km_and_Kcat_for_Oxaloacetate";  // kegg.reaction:R01956 ec-code:2.6.1.7; isDescribedBy pubmed:15606768
    R01956_Kcat = 2.393; R01956_E_T = 140.88; R01956_Ka = 0.0783; R01956_Kb = 0.07;
  AFMID_lfmkynr: M_Lfmkynr_c + $M_h2o_c => $M_for_c + M_Lkynr_c; Cytosol*function_4(AFMID_lfmkynr_E_T, AFMID_lfmkynr_turnover_A, scaling, M_Lfmkynr_c, AFMID_lfmkynr_Km_b, AFMID_lfmkynr_Km_c, AFMID_lfmkynr_Km_a, M_5hoxnfkyn_c, M_nformanth_c);  // modifiers: M_5hoxnfkyn_c, M_nformanth_c; kegg.reaction:R01959 ec-code:3.5.1.9; isDescribedBy pubmed:4190298
    AFMID_lfmkynr_E_T = 123.71; AFMID_lfmkynr_turnover_A = 100; AFMID_lfmkynr_Km_b = 0.4; AFMID_lfmkynr_Km_c = 0.211; AFMID_lfmkynr_Km_a = 0.05;
  KMO_need_to_set_NADPH_conc: M_Lkynr_c + $M_o2_c + $M_nadph_c + $M_h_c => M_hLkynr_c + $M_nadp_c + $M_h2o_c; Cytosol*function_5(KMO_need_to_set_NADPH_conc_Kcat, KMO_need_to_set_NADPH_conc_E_T, M_nadph_c, M_Lkynr_c, KMO_need_to_set_NADPH_conc_Ka, KMO_need_to_set_NADPH_conc_Kb, M_o2_c, M_h_c, scaling);  // ec-code:1.14.13.9 kegg.reaction:R01960; isDescribedBy pubmed:10672018 
    KMO_need_to_set_NADPH_conc_Kcat = 132; KMO_need_to_set_NADPH_conc_E_T = 112.55; KMO_need_to_set_NADPH_conc_Ka = 0.153; KMO_need_to_set_NADPH_conc_Kb = 0.1;
  INMT: $M_amet_c + M_trypta_c => $M_ahcys_c + $M_nmtrpta_c; Cytosol*function_2(INMT_E_T, INMT_turnover, M_trypta_c, M_amet_c, INMT_Km, scaling);  // kegg.reaction:R02174 ec-code:2.1.1.49; isDescribedBy pubmed:3949799
    INMT_E_T = 109.61; INMT_turnover = 0.45; INMT_Km = 0.12;
  HAAO: M_3hanthrn_c + $M_o2_c => M_cmusa_c; Cytosol*function_6(HAAO_E_T, HAAO_turnover, M_3hanthrn_c, HAAO_Ki1, HAAO_Ki2, M_o2_c, scaling, HAAO_Km, M_quln_c, M_anth_c);  // modifiers: M_quln_c, M_anth_c; kegg.reaction:R02665 ec-code:1.13.11.6; isDescribedBy pubmed:12672479 pubmed:3112306 
    HAAO_E_T = 130; HAAO_turnover = 64; HAAO_Ki1 = 2; HAAO_Ki2 = 4.9; HAAO_Km = 0.002;
  KYNU_3: M_hLkynr_c + $M_h2o_c => M_3hanthrn_c + $M_ala_DASH_L_c; Cytosol*function_4(KYNU_3_E_T, KYNU_3_turnover_A, scaling, M_hLkynr_c, KYNU_3_Km_b, KYNU_3_Km_c, KYNU_3_Km_a, M_Lkynr_c, M_Lfmkynr_c);  // modifiers: M_Lkynr_c, M_Lfmkynr_c; ec-code:3.7.1.3 kegg.reaction:R02668; isDescribedBy pubmed:17300176
    KYNU_3_E_T = 123.99; KYNU_3_turnover_A = 3.5; KYNU_3_Km_b = 0.438; KYNU_3_Km_c = 2.2; KYNU_3_Km_a = 0.03;
  ALDH2: M_id3acald_c + $M_nad_c + $M_h2o_c => $M_ind3ac_c + $M_nadh_c + $M_h_c; Cytosol*function_1(ALDH2_E_T, ALDH2_turnover, M_id3acald_c, M_nad_c, M_h2o_c, ALDH2_Km, scaling);  // ec-code:1.2.1.3 kegg.reaction:R02678; isDescribedBy pubmed:8605195
    ALDH2_E_T = 553.96; ALDH2_turnover = 9.33; ALDH2_Km = 0.00015;
  DDC_5HT: M_5htrp_c => M_srtn_c + $M_co2_c; Cytosol*function_3(DDC_5HT_E_T, DDC_5HT_turnover_B, scaling, M_5htrp_c, DDC_5HT_Km_a, DDC_5HT_Km_b, M_trp_DASH_L_c);  // modifiers: M_trp_DASH_L_c; ec-code:4.1.1.28 kegg.reaction:R02701; isDescribedBy pubmed:18547057
    DDC_5HT_E_T = 127.55; DDC_5HT_turnover_B = 0.67; DDC_5HT_Km_a = 0.049; DDC_5HT_Km_b = 0.049;
  IDO_5HT: M_5htrp_c + $M_o2_c => M_5hoxnfkyn_c; Cytosol*function_3(IDO_5HT_E_T, IDO_5HT_turnover_B, scaling, M_5htrp_c, IDO_5HT_Km_a, IDO_5HT_Km_b, M_trp_DASH_L_c);  // modifiers: M_trp_DASH_L_c; ec-code:1.13.11.52 kegg.reaction:R02702; isDescribedBy pubmed:18370401
    IDO_5HT_E_T = 98.35; IDO_5HT_turnover_B = 0.03; IDO_5HT_Km_a = 0.007; IDO_5HT_Km_b = 0.02;
  R03664: $M_atp_c + M_trp_DASH_L_c + $M_trna_trp_c => $M_amp_c + $M_ppi_c + $M_trp_L_trna_c; Cytosol*function_77(R03664_Kcat, R03664_E_T, M_trp_DASH_L_c, M_trna_trp_c, M_atp_c, R03664_Ka, R03664_Kb, scaling); R03664 is "WARS2_tRNA_recombinant_assume_km_equal_Ka_or_Kb";  // ec-code:6.1.1.2 kegg.reaction:R03664; isDescribedBy pubmed:11676605
    R03664_Kcat = 1.1; R03664_E_T = 273.39; R03664_Ka = 0.0074; R03664_Kb = 0.088;
  AFMID_5HNFK: M_5hoxnfkyn_c + $M_h2o_c => $M_5hxkyn_c + $M_for_c; Cytosol*function_4(AFMID_5HNFK_E_T, AFMID_5HNFK_turnover_A, scaling, M_5hoxnfkyn_c, AFMID_5HNFK_Km_b, AFMID_5HNFK_Km_c, AFMID_5HNFK_Km_a, M_Lfmkynr_c, M_nformanth_c);  // modifiers: M_Lfmkynr_c, M_nformanth_c; ec-code:3.5.1.9 kegg.reaction:R04911; isDescribedBy pubmed:4135014
    AFMID_5HNFK_E_T = 123.71; AFMID_5HNFK_turnover_A = 100; AFMID_5HNFK_Km_b = 0.05; AFMID_5HNFK_Km_c = 0.211; AFMID_5HNFK_Km_a = 0.4;
  RQA: M_cmusa_c => M_quln_c; Cytosol*RQA_k1*M_cmusa_c; RQA is "Quinolic Acid formation (spontaneous)";  // isDescribedBy pubmed:15656614
    RQA_k1 = 0.00025;
  R02173_MAO: M_trypta_c + $M_h2o_c + $M_o2_c => M_id3acald_c + $M_nh4_c + $M_h2o2_c; Cytosol*function_1(R02173_MAO_E_T, R02173_MAO_turnover, M_trypta_c, M_h2o_c, M_o2_c, R02173_MAO_Km, scaling); R02173_MAO is "MAOA";  // ec-code:1.4.3.4 kegg.reaction:R02173; isDescribedBy pubmed:11754741
    R02173_MAO_E_T = 272.77; R02173_MAO_turnover = 3.5; R02173_MAO_Km = 0.033;
  CATALASE: 2 M_3hanthrn_c + 4 $M_o2_c => M_Cinnavalininate_c + 2 $M_o2s_c + 2 $M_h2o2_c + 2 $M_h_c; Cytosol*Mass_action_two_substrate(M_3hanthrn_c, e1, M_o2_c, e2, CATALASE_k1);  // ec-code:1.11.1.6 kegg.reaction:R02670
    e1 = 2; e2 = 4; CATALASE_k1 = 0.0014;
  RKA: M_4aphdob_c => M_kynate_c; Cytosol*RKA_k1*M_4aphdob_c; RKA is "Kynurenate formation (spontaneous)";
    RKA_k1 = 1000;
  TRPtrans: $TRP_ex -> M_trp_DASH_L_c; Cytosol*function_8(TRPtrans_E_T, TRPtrans_turnover, TRP_ex, M_trp_DASH_L_c, scaling, TRPtrans_Km); TRPtrans is "Tryptophan_Transport";
    TRPtrans_E_T = 170; TRPtrans_turnover = 1.3; TRPtrans_Km = 0.019;
  R00678_IDO: M_trp_DASH_L_c + $M_o2_c => M_Lfmkynr_c; Cytosol*function_3(R00678_IDO_E_T, R00678_IDO_turnover_B, scaling, M_trp_DASH_L_c, R00678_IDO_Km_a, R00678_IDO_Km_b, M_5htrp_c);  // modifiers: M_5htrp_c; ec-code:1.13.11.52 kegg.reaction:R02702
    R00678_IDO_E_T = 98.35; R00678_IDO_turnover_B = 1.4; R00678_IDO_Km_a = 0.02; R00678_IDO_Km_b = 0.007;
  QPRT: $M_h_c + $M_prpp_c + M_quln_c => $M_co2_c + M_nicrnt_c + $M_ppi_c; Cytosol*function_1(QPRT_E_T, QPRT_turnover, M_h_c, M_prpp_c, M_quln_c, QPRT_Km, scaling);  // ec-code:2.4.2.19 kegg.reaction:R03348; isDescribedBy pubmed:17868694
    QPRT_E_T = 340; QPRT_turnover = 0.255; QPRT_Km = 0.0216;
  KYNU_1: M_Lfmkynr_c + $M_h2o_c => M_nformanth_c + $M_ala_DASH_L_c; Cytosol*function_4(KYNU_1_E_T, KYNU_1_turnover_A, scaling, M_Lfmkynr_c, KYNU_1_Km_b, KYNU_1_Km_c, KYNU_1_Km_a, M_Lkynr_c, M_hLkynr_c);  // modifiers: M_Lkynr_c, M_hLkynr_c; kegg.reaction:R03936 ec-code:3.7.1.3; isDescribedBy pubmed:457635 pubmed:118164 
    KYNU_1_E_T = 123.99; KYNU_1_turnover_A = 0.00168; KYNU_1_Km_b = 0.438; KYNU_1_Km_c = 0.03; KYNU_1_Km_a = 2.2;
  AFMID_nform: M_nformanth_c + $M_h2o_c => $M_for_c + $M_anth_c; Cytosol*function_4(AFMID_nform_E_T, AFMID_nform_turnover_A, scaling, M_nformanth_c, AFMID_nform_Km_b, AFMID_nform_Km_c, AFMID_nform_Km_a, M_Lfmkynr_c, M_5hoxnfkyn_c);  // modifiers: M_Lfmkynr_c, M_5hoxnfkyn_c; ec-code:3.5.1.9 kegg.reaction:R00988; isDescribedBy pubmed:4190298
    AFMID_nform_E_T = 123.71; AFMID_nform_turnover_A = 13.5; AFMID_nform_Km_b = 0.05; AFMID_nform_Km_c = 0.4; AFMID_nform_Km_a = 0.211;
  NMNAT1: $M_atp_c + $M_h_c + M_nicrnt_c -> $M_dnad_c + $M_ppi_c; Cytosol*function_1(NMNAT1_E_T, NMNAT1_turnover, M_nicrnt_c, M_h_c, M_atp_c, NMNAT1_Km, scaling);  // ec-code:2.7.7.1; isDescribedBy pubmed:17402747
    NMNAT1_E_T = 128; NMNAT1_turnover = 42.9; NMNAT1_Km = 0.0677;
  ExpCinn: M_Cinnavalininate_c => $Cinn_ex; Cytosol*ExpCinn_k1*M_Cinnavalininate_c; ExpCinn is "Export_Cinnavalininate";
    ExpCinn_k1 = 1000;
  RexpKA: M_kynate_c => $kynurenate_ex; Cytosol*RexpKA_k1*M_kynate_c; RexpKA is "Export_kynurenate";
    RexpKA_k1 = 1000;
  ACMSD: M_cmusa_c => $M_am6sa_c + $M_co2_c; Cytosol*function_9(ACMSD_E_T, ACMSD_turnover, M_cmusa_c, ACMSD_Ki1, ACMSD_Ki2, scaling, ACMSD_Km, M_quln_c, M_kynate_c);  // modifiers: M_quln_c, M_kynate_c; ec-code:4.1.1.45 kegg.reaction:R04323; isDescribedBy pubmed:17288562
    ACMSD_E_T = 147; ACMSD_turnover = 1; ACMSD_Ki1 = 1; ACMSD_Ki2 = 1; ACMSD_Km = 0.0065;
  MAOA_5HT: M_srtn_c + $M_h2o_c + $M_o2_c => $M_5hoxindact_c + $M_h2o2_c + $M_nh4_c; Cytosol*function_1(MAOA_5HT_E_T, MAOA_5HT_turnover, M_srtn_c, M_h2o_c, M_o2_c, MAOA_5HT_Km, scaling);
    MAOA_5HT_E_T = 272.77; MAOA_5HT_turnover = 0.1175; MAOA_5HT_Km = 0.0863;
  AANAT: $M_accoa_c + M_srtn_c => $M_Nacsertn_c + $M_coa_c + $M_h_c; Cytosol*function_2(AANAT_E_T, AANAT_turnover, M_accoa_c, M_srtn_c, AANAT_Km, scaling);
    AANAT_E_T = 111.53; AANAT_turnover = 0.6; AANAT_Km = 1.35;

  // Unit definitions:
  unit substance = 1e-3 mole;
end
